variable        NSTEPS          equal 1000000
variable        THERMO_FREQ     equal 1000
variable        DUMP_FREQ       equal 1000
variable        TEMP            equal 300.0
variable        TAU_T           equal 0.1

units           metal
boundary        p p p
atom_style      atomic
atom_modify     map yes

neighbor        1.0 bin

read_data       data.system
mass            1 28.0855
mass            2 15.999
pair_style      deepmd graph_compressed.pb
pair_coeff      * * Si O

thermo_style    custom step temp pe ke etotal press vol lx ly lz xy xz yz
thermo          ${THERMO_FREQ}
dump            1 all custom ${DUMP_FREQ} traj.lammpstrj id type element x y z
dump_modify     1 element Si O sort id

velocity        all create ${TEMP} 743574
fix             1 all nvt temp ${TEMP} ${TEMP} ${TAU_T}

timestep        0.0005
run             ${NSTEPS}
